<?xml version="1.0" encoding="UTF-8"?>
<neuroml xmlns="http://www.neuroml.org/schema/neuroml2"
    xmlns:xsi="http://www.w3.org/2001/XMLSchema-instance"
    xsi:schemaLocation="http://www.neuroml.org/schema/neuroml2 https://raw.github.com/NeuroML/NeuroML2/development/Schemas/NeuroML2/NeuroML_v2beta4.xsd"
    id = "NeuroML2_file_exported_from_NEURON">

  <notes> NeuroML 2 file generated from ModelView by: NEURON -- VERSION 7.3 ansi (1078:2b0c984183df) 2014-04-04
          Authors: Michael Hines, Sushil Kambampati and Padraig Gleeson,
          Yale University and UCL
  </notes>

  <cell id="Cell0">
    <notes>Cell: Cell0 exported from NEURON ModelView</notes>
    <morphology id="morphology">
<!-- Section: soma (segmentGroup: soma) which has 21 3D points, so 20 segment(s)-->
      <segment id="0" name = "Seg0_soma">
        <proximal x="-13.3261" y="0.735988" z="0" diameter="1.93525"/>
        <distal x="-13.6571" y="1.42646" z="0" diameter="3.26394"/>
      </segment>
      <segment id="2" name = "Seg1_soma">
        <parent segment="0"/>
        <distal x="-13.9882" y="2.11694" z="0" diameter="4.98415"/>
      </segment>
      <segment id="3" name = "Seg2_soma">
        <parent segment="2"/>
        <distal x="-14.3192" y="2.80741" z="0" diameter="6.31961"/>
      </segment>
      <segment id="4" name = "Seg3_soma">
        <parent segment="3"/>
        <distal x="-14.6503" y="3.49789" z="0" diameter="7.65507"/>
      </segment>
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
<!-- Section: soma (segmentGroup: soma) which has 21 3D points, so 20 segment(s)-->

      <segmentGroup id = "soma"  neuroLexId="sao864921383">    <!--
             This group contains an unbranched set of segments, and all of the segmentGroups marked with
             neuroLexId = sao864921383 form a non-overlapping set of all of the segments.
             These segmentGroups correspond to the 'cables' of NeuroML v1.8.1, and map to/from NEURON sections -->
        <member segment = "0"/>
        <member segment = "2"/>
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      </segmentGroup>

<!-- Section: dend[56] (segmentGroup: dend_56) which has 8 3D points, so 7 segment(s)-->

      <segmentGroup id = "dend_56"  neuroLexId="sao864921383">    <!--
             This group contains an unbranched set of segments, and all of the segmentGroups marked with
             neuroLexId = sao864921383 form a non-overlapping set of all of the segments.
             These segmentGroups correspond to the 'cables' of NeuroML v1.8.1, and map to/from NEURON sections -->
        <member segment = "1982"/>
        <member segment = "1983"/>
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      </segmentGroup>

<!-- Section: dend[21] (segmentGroup: dend_21) which has 11 3D points, so 10 segment(s)-->

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    </morphology>
  </cell>

  <network id="network" type="networkWithTemperature" temperature="6 degC">
    <population id="Pop_Cell0" component="Cell0" size="1"/>
  </network>

</neuroml>
